# S-N Curve Calculations
σ_uts := 58000 psi = 399.896 MPa
S_e' := σ_uts*0.5 = 199947962 Pa  # Occurs at 10^6 cycles
S_m := 0.9*σ_uts = 359906331 Pa  # Occurs at 10^3 cycles
500 hr = 1800000 s
9869.6044*sec = 2.74156 hr
3.195*10^4*0.8355% = 266.942
