# High Cycle Fatigue - Regular Show Operation
ω := (1/π) rad/(1 s) = 0.31831 rad/s  # Forcing Frequency (rad/s)
f_c := ω/(2*π) = 0.0506606 Hz  # Forcing Frequency (Hz)
# Nyquist Sampling Theorem:
f_s ≥ 2*f_c
n := 10  # Sampling 10 times per period to prevent aliasing
f_s := n*f_c = 0.506606 Hz
t := 1/f_s = 1.97392 s  # Sampling time
N_SWS := 5000  # Maximum SolidWorks Fatigue Waveform Points
t_SWS := N_SWS*t = 2.74156 hr  # Time segment modeled per SolidWorks Analysis
# Multiplier for Fatigue Events Over 10 Years
one_year := 8760 hr
ten_years := 10*one_year = 87600 hr
multiplier := ten_years/t_SWS = 31952.6
# Low Cycle Fatigue - Failure Mode Effects
# Failure mode event occurs every 500 hours of operation
num_events := ceil(ten_years/(500 hr)) = 176
# S-N Curve: Alloy Steel
S_UTS := 655 MPa
S_m := 0.9*S_UTS = 589.5 MPa
N_m := 10^3 = 1000
S'_e := 0.5*S_UTS = 327.5 MPa
N_e := 10^6 = 1000000
S_inf := S'_e = 327.5 MPa
N_inf := 10^10 = 10000000000
S := [S_m; S'_e; S_inf] = [589.5; 327.5; 327.5] MPa
N := [N_m; N_e; N_inf] = [1000; 1000000; 10000000000]
# [plot: S vs N]
