# Linear Actuator (Exlar FT80 High Capacity) Life Calculations
rate_travel := 8.579 m*tan(1 deg)*1/s = 5.89555 in/s
Life_allowable := 10 yr
Daily_operation := 12 hr/(1 day)
Life_million_inches := 1/10^6*rate_travel*3600 s/(1 hr)*Daily_operation*365 day/(1 yr)*Life_allowable = 929.611 in
# Linear Actuator Stroke Length Calculations
L_floor_platform := 8.579 m
Max_lift := L_floor_platform*tan(5 deg) = 29.5498 in  # Required Stroke Length
