σ_y_A500 := 317 MPa  # Square Tubing: ASTM A500 Grade B Yield Strength
σ_y_A992 := 345 MPa  # I-Beams: ASTM A992 Yield Strength
# Note: Using the lowest σ_y to be conservative:
σ_allow := σ_y_A500 = 317 MPa
σ_vm_static := 116 MPa  # Maximum Von-Mises Stress from SolidWorks FEA
FoS_static := σ_allow/σ_vm_static = 2.73276
